# Исходные данные
C := READRGB("test3.bmp")
M := "donerovyuri"
B := READ_BLUE("test3.bmp")
R := READ_RED("test3.bmp")
G := READ_GREEN("test3.bmp")
Lm := strlen(M) = 11
ORIGIN := 1
Y := cols(B)
X := rows(B)  # Константа определяющая энергию встраиваемого сигнала, чем больше, тем выше устойчивость встроенной информации к искажениям
λ := READBMP("test3.bmp")
v := 0.15
τ := 15  # Количество дублирующих встраиваний
Rr := 4  # Количество циклов вычисления координат
Ko := 125  # Первичный ключ
# Формирование ключа
K :=
    for s ∈ 1 .. 2*Rr
        K[s] ← Ko if s == 1
        K[s] ← str2num(substr(num2str(K[s - 1]^2), 0, 3)) if s > 1
        K[s] ← str2num(substr(num2str(K[s]), 0, 2)) if K[s] > 255
    K
B2D(x) := sum(x[i]*2^(i - 1), i = 1 .. 8)
D2B(x) :=
    for i ∈ 1 .. 8
        V[i] ← mod(x, 2)
        x ← floor(x/2)
    V
# Встраивание бит сообщения в псе-
# вдослучайные пиксели контейнера
B' :=
    B' ← B
    Mvec ← str2vec(M)
    Mvec_bin ← D2B(Mvec[1])
    for j ∈ 2 .. rows(Mvec)
        Mvec_bin ← stack(Mvec_bin, D2B(Mvec[j]))
    for i ∈ 1 .. τ*Lm*8
        x ← floor(i/Y) + 1
        y ← mod(i, Y) + 1
        for s ∈ 1 .. Rr
            x ← mod(x + B2D(vectorize(D2B(K[2*s - 1]) xor submatrix(D2B(y), 1, 8, 1, 1))), X) + 1
            y ← mod(y + B2D(vectorize(D2B(K[2*s]) xor submatrix(D2B(x), 1, 8, 1, 1))), Y) + 1
        j ← ceil(i/τ)
        B'[x, y] ← B[x, y] + (2*Mvec_bin[j] - 1)*v*λ[x, y]
        B'[x, y] ← 255 if B'[x, y] > 255
        B'[x, y] ← 0 if B'[x, y] < 0
    B'
# Скрываемое сообщение
S' := augment(R, G, B')
WRITERGB("res1.bmp") := S'
# Заполненный контейнер
W := C - S'
WRITERGB("soob1.bmp") := W
Bb := READ_BLUE("res1.bmp")
Y1 := cols(Bb)
X1 := rows(Bb)
σ := 3
# Модуль извлечения скрытого сообщения
Mm :=
    t ← 1
    for i ∈ 1 .. X1*Y1
        x ← floor(i/Y1) + 1
        y ← mod(i, Y1) + 1
        for s ∈ 1 .. Rr
            x ← mod(x + B2D(vectorize(D2B(K[2*s - 1]) xor submatrix(D2B(y), 1, 8, 1, 1))), X1) + 1
            y ← mod(y + B2D(vectorize(D2B(K[2*s]) xor submatrix(D2B(x), 1, 8, 1, 1))), Y1) + 1
        if σ < x ≤ (X1 - σ)
            σ1 ← (-σ)
            σ2 ← σ
        if x ≤ σ
            σ1 ← (1 - x)
            σ2 ← σ
        if x > (X1 - σ)
            σ1 ← (-σ)
            σ2 ← (X1 - x)
        if σ < y ≤ (Y1 - σ)
            σ3 ← (-σ)
            σ4 ← σ
        if y ≤ σ
            σ3 ← (1 - y)
            σ4 ← σ
        if y > (Y1 - σ)
            σ3 ← (-σ)
            σ4 ← (Y1 - y)
        Bb'[t] ← (sum(Bb[x + a, y], a = σ1 .. σ2) + sum(Bb[x, y + a], a = σ3 .. σ4) - 2*Bb[x, y])/(σ2 - σ1 + σ4 - σ3)
        Bbb[t] ← Bb[x, y]
        t ← t + 1
        if t > τ
            δ ← 1/τ*sum(Bbb[T] - Bb'[T], T = 1 .. τ)
            j ← ceil(i/τ)
            M'vec_bin[j] ← 0 if δ ≤ 0
            M'vec_bin[j] ← 1 if δ > 0
            t ← 1
    for j ∈ 1 .. rows(M'vec_bin)/8
        M'vec[j] ← B2D(submatrix(M'vec_bin, 8*j - 7, 8*j, 1, 1))
    M'vec
# Проверка на недопустимые символы
M' :=
    for j ∈ 1 .. strlen(M)
        M'[j] ←
            Mm[j] if (Mm[j] ≠ 31)
            32 otherwise
    vec2str(M')
M = "donerovyuri"
M' = "donerovyuri"
